*HEADING
cubit(ox/Writings/2017_QDES_DG/matlab/2d/seas/meshes/BP1_V7.inp): 04/05/2018: 15
version: 15.2
**
********************************** P A R T S **********************************
*PART, NAME=Part-Default
**
********************************** N O D E S **********************************
*NODE, NSET=ALLNODES
       1,    0.000000e+00,   -2.000000e+02,    0.000000e+00
       2,    0.000000e+00,   -1.876923e+02,    0.000000e+00
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**
********************************** E L E M E N T S ****************************
*ELEMENT, TYPE=S4R, ELSET=EB1
       1,       1,       2,       3,       4
       2,       2,       5,       6,       3
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**
********************************** S I D E S E T S **********************************
*ELSET, ELSET=SS1_E2
    2287,    2304,    2321,    2338,    2355,    2372,    2389,    2406,    2423,    2440,
    2457,    2474,    2491,    2508,    2525,    2542
*ELSET, ELSET=SS1_E3
     257,     258,     259,     260,     261,     262,     263,     264,     265,     266,
     267,     268,     269,     270,     271,     272
*SURFACE, NAME=SS1
SS1_E2, E2
SS1_E3, E3
*ELSET, ELSET=SS2_E1
      12,     275,     324,     367,     381,     445
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*ELSET, ELSET=SS2_E2
      64,      80,      96,     112,     128,     144,     160,     176,     192,     208,
     224,     240,     256,     272
*ELSET, ELSET=SS2_E3
    2529,    2530,    2531,    2532,    2533,    2534,    2535,    2536,    2537,    2538,
    2539,    2540,    2541,    2542
*ELSET, ELSET=SS2_E4
       1,      17,      33,      49,      65,      81
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*SURFACE, NAME=SS2
SS2_E1, E1
SS2_E2, E2
SS2_E3, E3
SS2_E4, E4
*ELSET, ELSET=SS3_E1
       1,       2,       3,       4,       5,       6
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*ELSET, ELSET=SS3_E4
     309,     313,     374,     773,    1215,    2070
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*SURFACE, NAME=SS3
SS3_E1, E1
SS3_E4, E4
*ELSET, ELSET=SS7_E1
    1302,    1309,    1313,    1314,    1321,    1322
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*ELSET, ELSET=SS7_E4
    1303,    1306,    1310,    1315,    1318,    1323
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*SURFACE, NAME=SS7
SS7_E1, E1
SS7_E4, E4
**
********************************** P R O P E R T I E S ************************
*SHELL SECTION, ELSET=EB1, SECTION INTEGRATION=SIMPSON, MATERIAL=Default-Steel
1.000000e+00
**
*END PART
**
**
**
********************************** E N D   P A R T S **********************************
**
**
********************************** A S S E M B L Y ************************************
**
*ASSEMBLY, NAME=ASSEMBLY1
**
*INSTANCE, NAME=Part-Default_1, PART=Part-Default
*END INSTANCE
**
*END ASSEMBLY
**
**
**
*MATERIAL, NAME = Default-Steel
*ELASTIC, TYPE=ISOTROPIC
2.068000e+05, 2.900000e-01
*DENSITY
7.000000e-06
*CONDUCTIVITY,TYPE=ISO
4.500000e-02
*SPECIFIC HEAT
5.000000e+02
**
**
************************************** H I S T O R Y *************************************
**
*PREPRINT
**
**************************************** S T E P 1 ***************************************
*STEP,INC=100,NAME=Default Set
**
*STATIC
1, 1, 1e-05, 1
**
**
**
**
*END STEP
